// COMSOL Multiphysics 6.3.0.290 model "2025_CA_UBC_Snaps_final_Snapshots_rebuilt_v63_typeB.mph"
// Outline of the model tree

Parameters
  Tref = 293.15[K]  // as is - comsol
  stirrer_base_H = 1.25 [cm]
  stirrer_base_R = (6.5/2) [mm]
  stirrer_x = 16.75 [cm]
  stirrer_y = 12.4 [cm]
  arc_R = 1.5 [cm]
  stirrer_extension = 6 [cm]
  cavity_W = 33 [cm]
  cavity_D = 37.5 [cm]
  cavity_H = 26.7 [cm]
  cavity_B = 3.95 [cm]
  port_R = (3.5/2) [cm]
  port_H = 0.5 [cm]
  ceramic_offsetW = 0.25 [cm]
  ceramic_offset_D1 = 0.1 [cm]
  ceramic_offset_D2 = 0.6 [cm]
  ceramic_H = 0.47752 [cm]
  waveguide_H = 6 [cm]
  waveguide_D = 11 [cm]
  waveguide_W = 1 [cm]
  waveguide_extension = 16[cm]+2[cm]
  waveguide_spacing = 16 [cm]
  dish_distance_door = 10 [cm]
  loc = d_glass+distance_from_door_offset
  liftit = d_glass  // 0.25 [cm]
  distance_from_door_offset = -1.25[cm]  // 1.25 [cm]
  T0 = 17.04 [degC]  // average of IR of initial - 2025-04 tests
  MCd = 0.2525  // new tests 2025-04
  MCw = (MCd/(1+MCd))
  Phi0 = 1-M2dryRho/M2coreRho  // porosity 45.75%
  M2dryRho = 1419.18 [kg/m^3]
  M2wetRho = 1803.54 [kg/(m^3)]
  M2coreRho = 2556.10 [kg/m^3]
  Cp_dry = 0.650 [J/(g*degC)]
  Cp_wet = (MCd*Cp_water+Cp_dry)/(1+MCd)
  k_wet = 0.969304893 [W/(m*K)]  // for 20% from excell
  k_dry = 0.274 [W/(m*K)]
  k_s = 1.794915168 [W/(m*K)]  // average of all at porosity = 45%
  L_L = 27.6 [cm]
  L_W = 18.4 [cm]
  M_L = 17.8 [cm]
  M_W = 12.8 [cm]
  S_L = 12.6 [cm]
  S_W = 8.6 [cm]
  L = S_W
  W = S_L
  mass_in = 275[g]
  H = (mass_in/M2wetRho)/(L*W)
  mass = volume*M2wetRho
  volume = (L*W*H)
  rho_air = 1.204 [kg/(m^3)]
  viscosity_air = 181.6e-7 [kg/(m*s)]  // [N*s/(m*m)]
  Cp_air = 1.005 [kJ/(kg*K)]
  k_air = 0.02623 [W/(m*K)]
  Tair = Tref
  k_glass = 1.143 [W/(m*K)]  // from: https://www.mit.edu/~6.777/matprops/pyrex.htm
  Cp_water = 4.2 [J/(g*degC)]
  rho_water = 998 [kg/(m^3)]
  k_water = 0.678 [W/(m*K)]
  phase_Change_latent = 2260 [J/g]
  onset_evaporation = 100
  phase_Change_dT = 2.5  // do not add the units here - comsol error
  phase_Change_dT_unit = phase_Change_dT * (1[K])
  phase_Change_starts = (onset_evaporation - phase_Change_dT/2)[degC]
  phase_Change_ends = phase_Change_starts+phase_Change_dT_unit
  phase_Change_peaks = phase_Change_starts +(phase_Change_dT_unit/2)
  v_blow = ((4.5+4.8)/2) [m/s]  // from Exp.
  Reynolds_top = rho_air*v_blow*L/viscosity_air
  Prandtle_top = viscosity_air*Cp_air/k_air
  Nu_avg_top = 0.037*(Reynolds_top^(4/5))*(Prandtle_top^(1/3))
  h_avg_top = Nu_avg_top*k_air/L
  U_upper_surface = 1/(1/h_avg_top)
  h_air_outside_o = (12.12 - 1.16 *v_blow/(1[m/s]) + 11.6*sqrt(v_blow/(1[m/s]))) [W/((m^2)*degC)]  // for velocities 2 to 20 m/s; should Air - 10 to 100 W/m2K; from: https://www.engineeringtoolbox.com/convective-heat-transfer-d_430.html
  Reynolds_sidewalls_long = rho_air*v_blow*L/viscosity_air
  Prandtle_sidewalls_long = viscosity_air*Cp_air/k_air
  Nu_avg_sidewalls_long = 0.037*(Reynolds_sidewalls_long^(4/5))*(Prandtle_sidewalls_long^(1/3))
  h_avg_sidewalls_long = Nu_avg_sidewalls_long*k_air/L
  U_sidewalls_long = 1/((1/h_avg_sidewalls_long)+(d_glass/k_glass))
  Reynolds_sidewalls_short = rho_air*v_blow*W/viscosity_air
  Prandtle_sidewalls_short = viscosity_air*Cp_air/k_air
  Nu_avg_sidewalls_short = 0.037*(Reynolds_sidewalls_short^(4/5))*(Prandtle_sidewalls_short^(1/3))
  h_avg_sidewalls_short = Nu_avg_sidewalls_short*k_air/W
  U_sidewalls_short = 1/((1/h_avg_sidewalls_short)+(d_glass/k_glass))
  Pin = 3000[W]  // 4400 [W]
  f_Port = 2.45 [GHz]
  comsol_max2min = 100  // from comsol extremly fine setup
  wavelength_in_air = c_const/(f_Port*sqrt(1*1))
  wavelength_in_material = c_const/(f_Port*sqrt(1*max(2.56,6.06)))
  wavelength_in_ceramic = c_const/(f_Port*sqrt(1*38))
  max_h_adviced_air_Nyquist = wavelength_in_air/2  // Nyquist Criterion
  max_h_adviced_material_Nyquist = wavelength_in_material/2  // Nyquist Criterion
  max_h_adviced_ceramic_Nyquist = wavelength_in_ceramic/2  // Nyquist Criterion
  max_h_adviced_air = wavelength_in_air/12
  max_h_adviced_material = wavelength_in_material/12
  max_h_adviced_ceramic = wavelength_in_ceramic/12
  maxCavity = max_h_adviced_air
  maxGaps = max_h_adviced_air
  maxCeramic = max_h_adviced_ceramic
  maxSample = max_h_adviced_material
  maxHT = maxSample  // no CFL in implicit - just capture the latent jump
  minSample = maxSample/comsol_max2min
  minHT = maxHT/comsol_max2min
  minGaps = maxGaps/comsol_max2min
  minCavity = maxCavity/comsol_max2min
  minCeramic = maxCeramic/comsol_max2min
  snapshot = 0
  time_in_oven = 60 [s]
  rampuptime = 3.07 [s]
  nettime = time_in_oven-rampuptime
  time_removal = 1.5 [s]
  time_handling = 11 [s]
  time_resting = time_handling-time_removal
  active_time = 0.5  // device level 0.8 = 80%
  time_offline = 1 [s]
  phase_Change_peaks_value = 2*phase_Change_latent/phase_Change_dT_unit
  phase_Change_back_calc = 0.5*phase_Change_peaks_value*phase_Change_dT_unit
  phase_Change_perK = phase_Change_latent/phase_Change_dT_unit
  no_magnetic_losses = 1.0
  phase_Change_perK_half = phase_Change_latent/(phase_Change_dT_unit/2)
  U_removal = 2500 [W/((m^2)*K)]
  U_resting = 15 [W/((m^2)*K)]
  rps = (360[deg])/(3.5[s])
  ang_bins = 45[deg]
  angs_in_a_cycle = 360[deg] /ang_bins
  stay_at_rotation_snapshot = ang_bins/rps
  this_many_snapshots = round(nettime / (stay_at_rotation_snapshot))  // round(nettime / (run_ht_this_much))
  run_ht_this_much = round((ang_bins/rps)*10)/10  // make note of collection stepsize in output if acquistation forced
  k_s_direct = ((k_dry/1[W/(m*K)])/((k_air/1[W/(m*K)])^Phi0))^(1/(1-Phi0))
  d_glass = 2.5 [mm]  // 5 [mm]

Functions
  an1: Analytic "quality" | funcname = xX; expr = if(T<phase_Change_starts, 1, if(T>phase_Change_ends, 0, 1 + ((0-1)/phase_Change_dT_unit)*(T-phase_Change_starts))); args = T; fununit = 1; argunit = K
  an2: Analytic "latent"
    funcname = add_latent
    expr = MCw* ( (T >= phase_Change_starts && T < phase_Change_peaks) * (2*phase_Change_latent/(phase_Change_ends - phase_Change_starts)) * ((T - phase_Change_starts)/(phase_Change_peaks - phase_Change_starts)) + (T >= phase_Change_peaks && T <= phase_Change_ends) * (2*phase_Change_latent/(phase_Change_ends - phase_Change_starts)) * ((phase_Change_ends - T)/(phase_Change_ends - phase_Change_peaks)) )
    args = T
    fununit = J/(kg*K)
    argunit = K
  int1: Interpolation "real part of dielectric loss of M2 wet2dry with moisture"
    funcnametable = {int1, 1}
    funcname = M2dlossRealwW
    table = 
      {14.75409836, 6.06}
      {14.20765027, 5.91}
      {10.38251366, 5.69}
      {8.743169399, 5.38}
      {6.557377049, 5.02}
      {2.732240437, 3.07}
      {0.546448087, 2.56}
      {0, 2.56}
    interp = cubicspline
    fununit = 1
    argunit = 1
  int2: Interpolation "imaginary part of dielectric loss of M2 wet2dry with moisture"
    funcnametable = {int2, 1}
    funcname = M2dlossImagwW
    table = 
      {14.75409836, 1.455}
      {14.75409836, 1.426}
      {10.38251366, 1.472}
      {8.743169399, 1.445}
      {6.557377049, 1.288}
      {2.732240437, 0.264}
      {0.546448087, 0.036}
      {0, 0.034}
    interp = piecewisecubic
    fununit = 1
    argunit = 1
  int3: Interpolation "real part of dielectric loss of water"
    funcnametable = {int1, 1}
    funcname = lossRealWater
    table = 
      {0.10845987, 82.29281768}
      {1.735357918, 82.54143646}
      {3.145336226, 82.54143646}
      {4.772234273, 82.29281768}
      {7.04989154, 82.16850829}
      {8.893709328, 81.79558011}
      {10.30368764, 81.67127072}
      {11.93058568, 80.92541436}
      {13.99132321, 80.67679558}
      {16.37744035, 80.05524862}
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    interp = cubicspline
    fununit = 1
    argunit = degC
  int4: Interpolation "imaginary part of dielectric loss of water"
    funcnametable = {int2, 1}
    funcname = lossImageWater
    table = 
      {0, 21.25690608}
      {0.867678959, 20.63535912}
      {1.518438178, 20.01381215}
      {2.386117137, 19.51657459}
      {3.362255965, 18.77071823}
      {4.229934924, 17.90055249}
      {5.531453362, 17.27900552}
      {6.8329718, 16.78176796}
      {7.809110629, 16.16022099}
      {9.002169197, 15.78729282}
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    interp = piecewisecubic
    fununit = 1
    argunit = degC
  an3: Analytic "kCK"
    funcname = kCK
    expr = (((k_s/(1[W/(m*K)]))^(1-Phi0))*((k_water/(1[W/(m*K)]))^((xX(T)*MCw*mass_in/rho_water)/(mass_in/M2wetRho)))*((k_air/(1[W/(m*K)]))^(Phi0-(((xX(T)*MCw*mass_in/rho_water)/(mass_in/M2wetRho))))))*(1[W/(m*K)])
    args = T
    fununit = W/(m*K)
    argunit = K
  an4: Analytic "kCK 1" | expr = (((k_s/(1[W/(m*K)]))^(1-Phi0))*((k_water/(1[W/(m*K)]))^((xMCw*mass_in/rho_water)/(mass_in/M2wetRho)))*((k_air/(1[W/(m*K)]))^(Phi0-(((xMCw*mass_in/rho_water)/(mass_in/M2wetRho))))))*(1[W/(m*K)]); args = xMCw; fununit = W/(m*K)

Probes
  dom7: Domain "maxXT" (disabled) on domains 5 | type = maximum; expr = xX(T); unit = 1; descr = maxXT
  dom8: Domain "minXT" (disabled) on domains 5 | type = minimum; expr = xX(T); unit = 1; descr = maxXT
  dom4: Domain "maxTgrad" (disabled) on domains 5 | type = maximum; expr = ht.gradTmag; unit = K/m; descr = maxTgrad
  dom5: Domain "minTgrad" (disabled) on domains 5 | type = minimum; expr = ht.gradTmag; unit = K/m; descr = minTgrad
  dom1: Domain "maxTv" (disabled) on domains 5 | type = maximum; expr = T; unit = °C; descr = maxTv
  dom2: Domain "minTv" (disabled) on domains 5 | type = minimum; expr = T; unit = °C; descr = minTv
  bnd1: Boundary "maxTs" (disabled) on boundaries 24 | type = maximum; expr = T; unit = °C; descr = maxTs
  bnd2: Boundary "minTs" (disabled) on boundaries 24 | type = minimum; expr = T; unit = °C; descr = minTs
  dom6: Domain "water mass" (disabled) on domains 5
    type = integral
    expr = ht.rho*xX(T)*MCw
    unit = g
    descr = water mass
  dom3: Domain "Qrh" on domains 5 | type = integral; expr = emw.Qrh; unit = W; descr = Qrh
  dom13: Domain "htQ" on domains 5 | type = integral; expr = ht.Q; unit = W; descr = ht Q
  dom9: Domain "maxkmean" (disabled) on domains 5 | type = maximum; expr = ht.kmean; unit = W/(m*K)
  dom10: Domain "minkmean" (disabled) on domains 5 | type = minimum; expr = ht.kmean; unit = W/(m*K)
  dom11: Domain "maxalphaTdMean" (disabled) on domains 5
    type = maximum
    expr = ht.alphaTdMean
    unit = m^2/s
    descr = maxalphaTdMean
  dom12: Domain "minalphaTdMean" (disabled) on domains 5
    type = minimum
    expr = ht.alphaTdMean
    unit = m^2/s
    descr = minalphaTdMean

Geometry
  geom1 "Geometry 1" (3D, length unit m)
    blk1: Block "cavity - top / main" | size = {cavity_W, cavity_D, cavity_H}; layerbottom = off
    blk2: Block "ceramic plate"
      size = {cavity_W-(ceramic_offsetW*2), cavity_D-(ceramic_offset_D1+ceramic_offset_D2), ceramic_H}
      pos = {ceramic_offsetW, ceramic_offset_D2, -ceramic_H}
      layerbottom = off
    blk3: Block "cavity - bottom"
      size = {cavity_W, cavity_D, cavity_B-ceramic_H}
      pos = {0, 0, -cavity_B}
      layerbottom = off
    blk4: Block "sample" | size = {W, L, H}; pos = {cavity_W/2-W/2, dish_distance_door-loc, liftit}; layerbottom = off
    cyl1: Cylinder "port - solid stirrer"
      r = stirrer_base_R
      h = stirrer_base_H
      pos = {cavity_W-stirrer_x, stirrer_y, cavity_H-stirrer_base_H}
      layerside = off
    cyl2: Cylinder "port - opening for energy"
      r = port_R
      h = port_H
      pos = {cavity_W-stirrer_x, stirrer_y, cavity_H-port_H}
      layerside = off
    pc3: ParametricCurve "port - stirrer 90 deg arc"
      coord = {0, -arc_R*cos(s*pi/2), -arc_R*sin(s*pi/2)}
      pos = {cavity_W-stirrer_x, stirrer_y+(stirrer_extension/2)/2, cavity_H-stirrer_base_H}
    pc2: ParametricCurve "port - stirrer 6 cm extension"
      coord = {0, stirrer_extension*s, 0}
      pos = {cavity_W-stirrer_x, stirrer_y+(stirrer_extension/2)/2, cavity_H-stirrer_base_H -arc_R*sin(1*pi/2)}
    swe1: Sweep "port - stirrer built"
      enttosweep = cyl1(1) boundaries 3
      crossfaces = on
      edge = pc3(1) edges 1; pc2(1) edges 1
      manualdir = off
      includefinal = off
      diredge = pc3(1) edges 1
    copy2: Copy "copying port and stirrer 2"
      input = cyl1, cyl2, swe1
      keep = on
      displx = 0
      disply = waveguide_spacing
      displz = 0
    copy4: Copy "copying port and stirrer 3"
      input = cyl1, cyl2, swe1
      keep = on
      displx = 0
      disply = waveguide_spacing/2
      displz = -cavity_H-cavity_B
    mir1: Mirror "mirroring port and stirrer 3"
      input = copy4
      pos = {cavity_W-stirrer_x, stirrer_y+waveguide_spacing/2, -cavity_B}
    rot2: Rotate "rotate 3 to fix configuration"
      input = mir1
      rot = 270
      pos = {cavity_W-stirrer_x, stirrer_y+waveguide_spacing/2, cavity_H-stirrer_base_H}
    blk5: Block "waveguide - base"
      size = {waveguide_W, waveguide_D, waveguide_H}
      pos = {cavity_W-waveguide_W, stirrer_y-waveguide_D/2, cavity_H}
      layerbottom = off
    pc1: ParametricCurve "waveguide - extension"
      coord = {-(waveguide_extension- waveguide_H)*s, 0, 0}
      pos = {cavity_W-waveguide_W, stirrer_y, cavity_H+waveguide_H/4+( waveguide_H*sin(2*pi/4)/4 )}
      geomattr = {construction, on}
      geomattrlevel = 16
    pc4: ParametricCurve "waveguide - extension arc"
      parmax = (2*pi)/4
      coord = {waveguide_H*sin(s), 0, waveguide_H*cos(s)}
      pos = {cavity_W-waveguide_W-(waveguide_extension- waveguide_H), stirrer_y, cavity_H-waveguide_H/4-(waveguide_H*sin(2*pi/4)/4 )}
      rot = 180
      rtol = 1.0E-9
      maxknots = 10000
      geomattr = {construction, on}
      geomattrlevel = 16
    swe2: Sweep "waveguide - built"
      enttosweep = blk5(1) boundaries 2
      crossfaces = on
      edge = pc1(1) edges 1; pc4(1) edges 1
      manualdir = off
      enttomatch = blk1(1) boundaries 4
      adjustlenend = 0.00001
      keep = off
      includefinal = off
      twisting = curvature
      diredge = pc1(1) edges 1
    mov2: Move | input = swe2; displx = waveguide_W; disply = 0; displz = 0
    dif1: Difference | input = mov2; input2 = blk1; keepsubtract = on
    copy1: Copy "copying waveguide for 2" | input = dif1; keep = on; displx = 0; disply = waveguide_spacing; displz = 0
    rot1: Rotate "port and stirrer 2"
      input = copy2
      rot = 90
      pos = {cavity_W-stirrer_x, stirrer_y+waveguide_spacing, cavity_H-stirrer_base_H}
    copy3: Copy "copying waveguide for 3"
      input = dif1
      keep = on
      displx = 0
      disply = waveguide_spacing/2
      displz = -cavity_H-cavity_B-waveguide_H
    mir2: Mirror "mirroring in waveguide 3"
      input = copy3
      pos = {cavity_W-stirrer_x, stirrer_y+waveguide_spacing/2, -cavity_B}
    mov1: Move | input = mir2; displx = 0; disply = 0; displz = -waveguide_H/2-( waveguide_H*sin(2*pi/4)/2 )
    rot3: Rotate "rotation clockwise - 1"
      input = cyl1, cyl2, swe1
      rot = snapshot * ang_bins
      pos = {cavity_W-stirrer_x, stirrer_y, cavity_H-stirrer_base_H}
    rot4: Rotate "rotation clockwise - 2"
      input = rot1
      rot = snapshot * ang_bins
      pos = {cavity_W-stirrer_x, stirrer_y+waveguide_spacing, cavity_H-stirrer_base_H}
    rot5: Rotate "rotation clockwise - 3"
      input = rot2
      rot = snapshot * ang_bins
      pos = {cavity_W-stirrer_x, stirrer_y+waveguide_spacing/2, cavity_H-stirrer_base_H}
    fin: Finalize "Form Union" | pairtype = contact

Materials
  mat1: Common "air" on all domains
    def: def "Basic"
      relpermittivity = 1.0
      relpermeability = no_magnetic_losses
      electricconductivity = 2*pi[rad]*f_Port*epsilon0_const*0
  mat2: Common "sample" on domains 5
    def: def "Basic"
      relpermittivity = M2dlossRealwW(100*xX(T)*MCw)-M2dlossImagwW(100*xX(T)*MCw)*j
      relpermeability = no_magnetic_losses
      electricconductivity = 2*pi[rad]*f_Port*epsilon0_const*M2dlossImagwW(100*xX(T)*MCw)
      density = M2wetRho*xX(T)+M2dryRho*(1-xX(T))
      heatcapacity = Cp_wet*xX(T)+Cp_dry*(1-xX(T))+add_latent(T)
      thermalconductivity = kCK(T)
  mat3: Common "ceramic" on domains 3
    def: def "Basic"
      relpermittivity = 38-0*j
      relpermeability = no_magnetic_losses
      electricconductivity = 2*pi[rad]*f_Port*epsilon0_const*0
  mat4: Common "water" (disabled) on no domains
    def: def "Basic"
      relpermittivity = lossRealWater(T)-lossImagWater(T)*j
      relpermeability = no_magnetic_losses
      electricconductivity = 2*pi[rad]*f_Port*epsilon0_const*lossImagWater(T)
      density = rho_water
      heatcapacity = Cp_water
      thermalconductivity = k_water

Physics
  emw: ElectromagneticWaves "Irradation" on domains 1-3, 5-11, 23-25
    dependent variable E = {Ex, Ey, Ez}
    wee1: WaveEquationElectric (default) | minput_frequency = f_Port; minput_temperature_src = root.comp1.T
    pec1: PerfectElectricConductor (default)
    init1: init "Initial Values 1" (default)
    port1: Port on boundaries 136 | Pin = Pin/3; PortType = Rectangular
    port2: Port on boundaries 138 | PortExcitation = on; Pin = Pin/3; PortType = Rectangular
    port3: Port on boundaries 137 | PortExcitation = on; Pin = Pin/3; PortType = Rectangular
  ht: HeatTransferInFluids "Heating" on domains 5
    dependent variable T
    PhysicalModelProperty.Tref = Tref
    fluid1: FluidHeatTransferModel "Fluid 1" (default)
    init1: init "Initial Values 1" (default)
      Tinit = if(snapshot>0, withsol('sol2', T, setind(snapshot, snapshot), setind(t, 'last') ), T0)
    ins1: ThermalInsulation (default)
    hf1: HeatFluxBoundary "top" on boundaries 24 | HeatFluxType = ConvectiveHeatFlux; h = U_upper_surface; Text = Tair
    hf2: HeatFluxBoundary "long" on boundaries 22, 25
      HeatFluxType = ConvectiveHeatFlux
      h = U_sidewalls_long
      Text = Tair
    hf3: HeatFluxBoundary "short" on boundaries 21, 131
      HeatFluxType = ConvectiveHeatFlux
      h = U_sidewalls_short
      Text = Tair
    hf4: HeatFluxBoundary "rapid removal" on boundaries 21, 22, 24, 25, 131
      HeatFluxType = ConvectiveHeatFlux
      h = U_removal
      Text = Tair
    hs1: HeatSource on domains 5 | Q0 = emw.Qrh
    hf5: HeatFluxBoundary "resting" on boundaries 21, 22, 24, 25, 131
      HeatFluxType = ConvectiveHeatFlux
      h = U_resting
      Text = Tair

Mesh
  mesh1 "EM"
    size: MeshSizeDefault | hmax = maxCavity; hmin = minCavity; hauto = 1; custom = on
    ftet1: FreeTet "Sample" on domains 5
      size1: Size on domains 5 | hmax = maxSample; hmin = minSample; hauto = 1; custom = on
    ftet2: FreeTet "Cavity" on domains 1, 2, 4, 6-25
      size1: Size on domains 1, 2, 6-11, 23-25 | hmax = maxCavity; hmin = minCavity; hauto = 1; custom = on
    ftet3: FreeTet "Ceramic plate" on domains 3
      size1: Size on domains 3 | hmax = maxCeramic; hmin = minCeramic; hauto = 1; custom = on
  mesh2 "HT"
    size: MeshSizeDefault | hmax = maxHT; hmin = minHT; hauto = 1; custom = on
    ftet1: FreeTet "Free Tetrahedral 1" on domains 5

Studies
  std1 "runME"
    param: Parametric "Parametric Sweep"
      pname = snapshot
      plistarr = range(0,1,this_many_snapshots)
      punit = 1
      useaccumtable = on
      defsolvergen = all
      reusesol = on
    freq: Frequency "Irradiation - EM" | punit = GHz; plist = f_Port; preusesol = yes; mesh = {geom1, mesh1}
    tranf: TransientFluid "Irradiation - HT" | tlist = 0 stay_at_rotation_snapshot; disabledphysics = {ht/hf4, ht/hf5}
    tranf3: TransientFluid "Irradiation - HT - offline" (disabled)
      tlist = 0 time_offline
      disabledphysics = {ht/hf4, ht/hf5, ht/hs1}
    tranf1: TransientFluid "Removal" (disabled)
      tlist = 0 time_removal
      disabledphysics = {ht/hf5, ht/hf1, ht/hf2, ht/hf3, ht/hs1}
    tranf2: TransientFluid "Resting" (disabled)
      tlist = 0 time_resting
      disabledphysics = {ht/hf4, ht/hf1, ht/hf2, ht/hf3, ht/hs1}

Methods
  runTHIS: CodeEditor
    public class runTHIS extends ApplicationMethod {
      public void execute() {
        model.batch("p1").run();
      }
    }