// COMSOL Multiphysics 6.1.0.252 model "20230800_VLE_MATPHYwSEL_sel_wLLL_VLE.mph"
// MW Drying
// Outline of the model tree

Parameters
  ovenH = 60 [cm]
  ovenD = 60 [cm]
  basaltD = 15[cm]
  basaltH = 2 [cm]
  basaltW = 10[cm]
  ovenW = 60 [cm]
  distance = 65 [mm]
  doorW = 40 [cm]
  doorH = 40[cm]
  doorD = 2.25 [cm]
  gun_bH = ovenH*1.5  // ovenH*1.5
  gun_bW = 44[mm]
  gun_bD = 86[mm]
  gun_bX = ovenX
  gun_bY = ovenY
  gun_bZ = ovenH/2+gun_bH/2
  doorX = ovenX
  doorY = -ovenD/2+doorD/2
  doorZ = ovenZ
  basaltX = ovenX
  basaltY = ovenY
  basaltZ = gun_bZ-gun_hH-gun_bH/2-distance
  ovenX = 0 [cm]
  ovenY = 0 [cm]
  ovenZ = 0 [cm]
  basalt_rho = 2870 [kg/m^3]
  basalt_k = 1.58992 [W/(m*degC)]
  basalt_Cp = 798 [J/(kg*degC)]
  basalt_eps_real = 9.68
  basalt_eps_image = 1.51
  basalt_miu_real = 1
  basalt_miu_image = 0.0
  basalt_ke = 0.00005 [S/m]
  gun_hH = 9 [cm]
  gun_hD = 147.04 [mm]
  gun_hW = 100.41 [mm]
  bend_r_max = 0.20416 [m]
  bend_r_min = 0.13505 [m]
  bend_r_avg = (bend_r_max+bend_r_min)/2
  bend_tetha = pi/2
  wing_right = 0.5 [m]
  wing_down = 0.84 [m]
  runtime = 4.35 [s]  // 4.35 s
  runtest = 0.12 [s]
  rundt = 50 [ms]
  gunFreq = 2.45 [GHz]
  gunPow = 3 [kW]
  gunMode = 10
  basalt_air = 0
  basalt_vapour = 0
  basalt_porosity = 0
  basalt_phi = 0  // basalt_moisture/basalt_rho
  air_mw = 28.96 [g/mol]
  water_mw = 18.01528 [g/mol]
  basalt_mw = 217 [g/mol]
  R_universal = 8.31446261815324 [J/(K*mol)]
  basalt_sound = 4.64 [km/s]
  total_vol = basalt_phi+basalt_vapour+basalt_air
  diff_vols = basalt_porosity-total_vol
  water_latent_heat = 2250 [kJ/kg]

Functions
  int1: Interpolation "SatLiq"
    funcname = SatLiq
    table = 
      {0.01, 0.006}
      {2, 0.007}
      {4, 0.008}
      {10, 0.0121}
      {14, 0.0158}
      {18, 0.0204}
      {20, 0.0231}
      {25, 0.0313}
      {30, 0.0419}
      {34, 0.0526}
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    extrap = interior
    fununit = atm
    argunit = degC
  int2: Interpolation "phiMXair"
    funcname = phiMxair
    table = {{-25, 0.64}, {-20, 1.05}, {-15, 1.58}, {-10, 2.31}, {-5, 3.37}, {0, 4.89}, {5, 6.82}, {10, 9.39}, {15, 12.8}, {20, 17.3}, {30, 30.4}, {40, 51.1}, {50, 83}, {60, 130}}
    extrap = interior
    fununit = g/(m^3)
    argunit = degC
  int3: Interpolation "basalt_dielectric_real" | funcs = {int1, 1}; funcname = basalt_dielectric_real; table = {{25, 9.67}, {55, 10.14}, {78, 10.34}, {105, 10.38}}; interp = cubicspline; extrap = interior; fununit = 1; argunit = degC
  int4: Interpolation "basalt_dielectric_image" | funcs = {int1, 1}; funcname = basalt_dielectric_image; table = {{25, 1.5055}, {55, 1.8370}, {78, 1.9171}, {105, 1.84944}}; interp = cubicspline; extrap = interior; fununit = 1; argunit = degC
  int5: Interpolation "water_dielectric_real_2p45"
    funcs = {int1, 1}
    funcname = water_dielectric_real_2p45
    table = 
      {0.10845987, 82.29281768}
      {1.735357918, 82.54143646}
      {3.145336226, 82.54143646}
      {4.772234273, 82.29281768}
      {7.04989154, 82.16850829}
      {8.893709328, 81.79558011}
      {10.30368764, 81.67127072}
      {11.93058568, 80.92541436}
      {13.99132321, 80.67679558}
      {16.37744035, 80.05524862}
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    interp = piecewisecubic
    extrap = linear
    fununit = 1
    argunit = degC
  int6: Interpolation "water_dielectric_image_2p45"
    funcs = {int2, 1}
    funcname = water_dielectric_image_2p45
    table = 
      {0, 21.25690608}
      {0.867678959, 20.63535912}
      {1.518438178, 20.01381215}
      {2.386117137, 19.51657459}
      {3.362255965, 18.77071823}
      {4.229934924, 17.90055249}
      {5.531453362, 17.27900552}
      {6.8329718, 16.78176796}
      {7.809110629, 16.16022099}
      {9.002169197, 15.78729282}
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    interp = cubicspline
    extrap = linear
    fununit = 1
    argunit = degC
  int7: Interpolation "vapor_dielectric_real_2p45v"
    funcs = {int1, 1}
    funcname = vapor_dielectric_real_2p45v
    table = 
      {0, 1}
      {10, 1}
      {20, 1}
      {30, 1}
      {40, 1}
      {50, 1}
      {60, 1}
      {70, 1}
      {80, 1}
      {90, 1}
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    extrap = linear
    fununit = 1
    argunit = degC

Coordinate systems
  sys1: Boundary "Boundary System 1" | name = BCs

Common definitions
  ampr1: AmbientProperties "Ambient" | name = environment; T_amb = minput.T; p_amb = minput.pA; phi_amb = minput.phi
  minpt1: CommonInputDef "Tin" on all domains | value = 20 [degC]
  minpt2: CommonInputDef "Pin" on all domains | quantity = pressure; value = 1[atm]
  minpt3: CommonInputDef "AirHumidity" on all domains | quantity = relativehumidity; value = 0.85

Geometry
  geom1 "xyz" (3D, length unit m)
    blk1: Block "oven" | pos = {ovenX, ovenY, ovenZ}; base = center; size = {ovenW, ovenD, ovenH}; layerbottom = off
    blk2: Block "door" | pos = {doorY, doorX, doorZ}; base = center; size = {doorD, doorW, doorH}; layerbottom = off
    dif1: Difference "cavity" (disabled) | input = blk1; input2 = blk2
    blk3: Block "basalt"
      pos = {basaltX, basaltY, basaltZ}
      base = center
      size = {basaltW, basaltD, basaltH}
      layerbottom = off
    sel1: ExplicitSelection "out_basalt" | selection = blk3(1) domains 1
    hex1: Hexahedron "gun_head"
      p = 
        {gun_bX-gun_hW/2, gun_bX-gun_hW/2, gun_bX+gun_hW/2, gun_bX+gun_hW/2, gun_bX-gun_bW/2, gun_bX-gun_bW/2, gun_bX+gun_bW/2, gun_bX+gun_bW/2}
        {gun_bY-gun_hD/2, gun_bY+gun_hD/2, gun_bY+gun_hD/2, gun_bY-gun_hD/2, gun_bY-gun_bD/2, gun_bY+gun_bD/2, gun_bY+gun_bD/2, gun_bY-gun_bD/2}
        {gun_bZ-gun_hH-gun_bH/2, gun_bZ-gun_hH-gun_bH/2, gun_bZ-gun_hH-gun_bH/2, gun_bZ-gun_hH-gun_bH/2, gun_bZ-gun_bH/2, gun_bZ-gun_bH/2, gun_bZ-gun_bH/2, gun_bZ-gun_bH/2}
    pc1: ParametricCurve "gun_bend_l2r"
      pos = {basaltX+(bend_r_avg/bend_tetha), 0, gun_bZ-gun_bH/2}
      axistype = y
      parname = tetha
      parmin = -bend_tetha
      parmax = 0
      coord = {(bend_r_avg/bend_tetha)*sin(tetha), (bend_r_avg/bend_tetha)*cos(tetha), 0}
    ls1: LineSegment "gun_bend_2r"
      specify1 = coord
      coord1 = {basaltX+(bend_r_avg/bend_tetha) + (bend_r_avg/bend_tetha)*sin(0), 0, gun_bZ-gun_bH/2 + (bend_r_avg/bend_tetha)*cos(0)}
      specify2 = coord
      coord2 = {basaltX+(bend_r_avg/bend_tetha) + (bend_r_avg/bend_tetha)*sin(0) + wing_right, 0, gun_bZ-gun_bH/2 + (bend_r_avg/bend_tetha)*cos(0)}
    pc2: ParametricCurve "gun_bend_u2d"
      pos = {basaltX+(bend_r_avg/bend_tetha) + (bend_r_avg/bend_tetha)*sin(0) + wing_right, 0, gun_bZ-gun_bH/2}
      rot = 90
      axistype = y
      parname = tetha
      parmin = -bend_tetha
      parmax = 0
      coord = {(bend_r_avg/bend_tetha)*sin(tetha), (bend_r_avg/bend_tetha)*cos(tetha), 0}
    ls2: LineSegment "gun_bend_2d"
      specify1 = coord
      coord1 = {basaltX+(bend_r_avg/bend_tetha) + (bend_r_avg/bend_tetha)*sin(0) + wing_right +(bend_r_avg/bend_tetha), 0, gun_bZ-gun_bH/2}
      specify2 = coord
      coord2 = {basaltX +(bend_r_avg/bend_tetha) + (bend_r_avg/bend_tetha)*sin(0) + wing_right + (bend_r_avg/bend_tetha), 0, gun_bZ-gun_bH/2 - wing_down}
    pc3: ParametricCurve "gun_bend_r2l"
      pos = {basaltX +(bend_r_avg/bend_tetha) + (bend_r_avg/bend_tetha)*sin(0) + wing_right, 0, gun_bZ-gun_bH/2 - wing_down}
      rot = -180
      axistype = y
      parname = tetha
      parmin = -bend_tetha
      parmax = 0
      coord = {(bend_r_avg/bend_tetha)*sin(tetha), (bend_r_avg/bend_tetha)*cos(tetha), 0}
    swe1: Sweep "gun_make"
      face = hex1(1) boundaries 3
      crossfaces = on
      includefinal = off
      edge = pc1(1) edges 1; ls1(1) edges 1; pc2(1) edges 1; ls2(1) edges 1; pc3(1) edges 1
      diredge = pc1(1) edges 1
      reversedir = on
    uni1: Union "waveguide" | input = hex1, swe1
    fin: Finalize "XYZ"

Materials
  air: Common on all domains
    def "Basic"
      thermalexpansioncoefficient = alpha_p(pA,T)
      molarmass = 0.02897[kg/mol]
      bulkviscosity = muB(T)
      relpermeability = 1
      relpermittivity = 1
      dynamicviscosity = eta(T)
      ratioofspecificheat = 1.4
      electricconductivity = 0[S/m]
      heatcapacity = Cp(T)
      density = rho(pA,T)
      thermalconductivity = k(T)
      soundspeed = cs(T)
      porosity = 1
      specificgasconstant = R_const/Mn
      eta: Piecewise | arg = T; pieces = {200.0, 1600.0, -8.38278E-7+8.35717342E-8*T^1-7.69429583E-11*T^2+4.6437266E-14*T^3-1.06585607E-17*T^4}; argunit = K; fununit = Pa*s
      Cp: Piecewise | arg = T; pieces = {200.0, 1600.0, 1047.63657-0.372589265*T^1+9.45304214E-4*T^2-6.02409443E-7*T^3+1.2858961E-10*T^4}; argunit = K; fununit = J/(kg*K)
      rho: Analytic | expr = pA*0.02897/R_const[K*mol/J]/T; args = {pA, T}; fununit = kg/m^3; argunit = {Pa, K}
      k: Piecewise | arg = T; pieces = {200.0, 1600.0, -0.00227583562+1.15480022E-4*T^1-7.90252856E-8*T^2+4.11702505E-11*T^3-7.43864331E-15*T^4}; argunit = K; fununit = W/(m*K)
      cs: Analytic | expr = sqrt(1.4*R_const[K*mol/J]/0.02897*T); args = T; fununit = m/s; argunit = K
      an1: Analytic | funcname = alpha_p; expr = -1/rho(pA,T)*d(rho(pA,T),T); args = {pA, T}; fununit = 1/K; argunit = {Pa, K}
      an2: Analytic "Analytic 2a" | funcname = muB; expr = 0.6*eta(T); args = T; fununit = Pa*s; argunit = K
    RefractiveIndex
      n = 1
      ki = 0
    NonlinearModel
      BA = (def.gamma+1)/2
    idealGas
      Rs = R_const/Mn
      heatcapacity = Cp(T)
      ratioofspecificheat = 1.4
      molarmass = 0.02897
      Cp: Piecewise | arg = T; pieces = {200.0, 1600.0, 1047.63657-0.372589265*T^1+9.45304214E-4*T^2-6.02409443E-7*T^3+1.2858961E-10*T^4}; argunit = K; fununit = J/(kg*K)
    DielectricLoss "Dielectric losses"
      epsilonBis = {2*(air.rfi.n11*air.rfi.ki11+air.rfi.n21*air.rfi.ki21+air.rfi.n31*air.rfi.ki31), air.rfi.n11*air.rfi.ki12+air.rfi.ki11*air.rfi.n12+air.rfi.n21*air.rfi.ki22+air.rfi.ki21*air.rfi.n22+air.rfi.n31*air.rfi.ki32+air.rfi.ki31*air.rfi.n32, air.rfi.n11*air.rfi.ki13+air.rfi.ki11*air.rfi.n13+air.rfi.n21*air.rfi.ki23+air.rfi.ki21*air.rfi.n23+air.rfi.n31*air.rfi.ki33+air.rfi.ki31*air.rfi.n33, air.rfi.n12*air.rfi.ki11+air.rfi.ki12*air.rfi.n11+air.rfi.n22*air.rfi.ki21+air.rfi.ki22*air.rfi.n21+air.rfi.n32*air.rfi.ki31+air.rfi.ki32*air.rfi.n31, 2*(air.rfi.n12*air.rfi.ki12+air.rfi.n22*air.rfi.ki22+air.rfi.n32*air.rfi.ki32), air.rfi.n12*air.rfi.ki13+air.rfi.ki12*air.rfi.n13+air.rfi.n22*air.rfi.ki23+air.rfi.ki22*air.rfi.n23+air.rfi.n32*air.rfi.ki33+air.rfi.ki32*air.rfi.n33, air.rfi.n13*air.rfi.ki11+air.rfi.ki13*air.rfi.n11+air.rfi.n23*air.rfi.ki21+air.rfi.ki23*air.rfi.n21+air.rfi.n33*air.rfi.ki31+air.rfi.ki33*air.rfi.n31, air.rfi.n13*air.rfi.ki12+air.rfi.ki13*air.rfi.n12+air.rfi.n23*air.rfi.ki22+air.rfi.ki23*air.rfi.n22+air.rfi.n33*air.rfi.ki32+air.rfi.ki33*air.rfi.n32, 2*(air.rfi.n13*air.rfi.ki13+air.rfi.n23*air.rfi.ki23+air.rfi.n33*air.rfi.ki33)}
      epsilonPrim = {air.rfi.n11^2-air.rfi.ki11^2+air.rfi.n21^2-air.rfi.ki21^2+air.rfi.n31^2-air.rfi.ki31^2, air.rfi.n11*air.rfi.n12-air.rfi.ki11*air.rfi.ki12+air.rfi.n21*air.rfi.n22-air.rfi.ki21*air.rfi.ki22+air.rfi.n31*air.rfi.n32-air.rfi.ki31*air.rfi.ki32, air.rfi.n11*air.rfi.n13-air.rfi.ki11*air.rfi.ki13+air.rfi.n21*air.rfi.n23-air.rfi.ki21*air.rfi.ki23+air.rfi.n31*air.rfi.n33-air.rfi.ki31*air.rfi.ki33, air.rfi.n12*air.rfi.n11-air.rfi.ki12*air.rfi.ki11+air.rfi.n22*air.rfi.n21-air.rfi.ki22*air.rfi.ki21+air.rfi.n32*air.rfi.n31-air.rfi.ki32*air.rfi.ki31, air.rfi.n12^2-air.rfi.ki12^2+air.rfi.n22^2-air.rfi.ki22^2+air.rfi.n32^2-air.rfi.ki32^2, air.rfi.n12*air.rfi.n13-air.rfi.ki12*air.rfi.ki13+air.rfi.n22*air.rfi.n23-air.rfi.ki22*air.rfi.ki23+air.rfi.n32*air.rfi.n33-air.rfi.ki32*air.rfi.ki33, air.rfi.n13*air.rfi.n11-air.rfi.ki13*air.rfi.ki11+air.rfi.n23*air.rfi.n21-air.rfi.ki23*air.rfi.ki21+air.rfi.n33*air.rfi.n31-air.rfi.ki33*air.rfi.ki31, air.rfi.n13*air.rfi.n12-air.rfi.ki13*air.rfi.ki12+air.rfi.n23*air.rfi.n22-air.rfi.ki23*air.rfi.ki22+air.rfi.n33*air.rfi.n32-air.rfi.ki33*air.rfi.ki32, air.rfi.n13^2-air.rfi.ki13^2+air.rfi.n23^2-air.rfi.ki23^2+air.rfi.n33^2-air.rfi.ki33^2}
      eta_epsilon = 0
  vapour: Common "Water, vapor" on selection geom1_blk3_dom
    def "Basic"
      density = Densitypp2(T, pA)
      heatcapacity = HeatCapacityCppp2(T,pA)
      ratioofspecificheat = HeatCapacityRatioCpCvpp2(T, pA)
      thermalconductivity = ThermalConductivitypp2(T, pA)
      dynamicviscosity = Viscositypp2(T, pA)
      thermalexpansioncoefficient = -1/Densitypp2(T, pA)*Densitypp2_Dtemperature(T, pA)
      compressibility = 1/(HeatCapacityRatioCpCvpp2(T, pA)*Densitypp2(T, pA))*Densitypp2_Dpressure(T, pA)
      soundspeed = sqrt(HeatCapacityRatioCpCvpp2(T, pA)/Densitypp2_Dpressure(T, pA))
      electricconductivity = 5.5e-6[S/m]
      specificgasconstant = R_const/Mn
      porosity = 1
    DielectricLoss "Dielectric losses"
      epsilonBis = 0
      epsilonPrim = vapor_dielectric_real_2p45v(T)
      eta_epsilon = 0
      int3: Interpolation "dielectric_real_2p45v" (disabled)
        funcs = {int1, 1}
        funcname = dielectric_real_2p45v
        table = 
          {0, 1}
          {10, 1}
          {20, 1}
          {30, 1}
          {40, 1}
          {50, 1}
          {60, 1}
          {70, 1}
          {80, 1}
          {90, 1}
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        extrap = linear
        fununit = 1
        argunit = degC
    MagneticLosses
      murPrim = 1.0
      murBis = 0.0
    idealGas
      Rs = R_const/Mn
      heatcapacity = HeatCapacityCppp2(T,pA)
      ratioofspecificheat = 1.33
      molarmass = water_mw
  moisture: Common "Water, liquid" on selection geom1_blk3_dom
    def "Basic"
      thermalexpansioncoefficient = alpha_p(T)
      bulkviscosity = muB(T)
      dynamicviscosity = eta(T)
      ratioofspecificheat = gamma_w(T)
      electricconductivity = 5.5e-6[S/m]
      heatcapacity = Cp(T)
      density = rho(T)
      thermalconductivity = k(T)
      soundspeed = cs(T)
      porosity = 1
      specificgasconstant = R_const/Mn
      eta: Piecewise
        arg = T
        pieces = 
          {273.15, 413.15, 1.3799566804-0.021224019151*T^1+1.3604562827E-4*T^2-4.6454090319E-7*T^3+8.9042735735E-10*T^4-9.0790692686E-13*T^5+3.8457331488E-16*T^6}
          {413.15, 553.75, 0.00401235783-2.10746715E-5*T^1+3.85772275E-8*T^2-2.39730284E-11*T^3}
        argunit = K
        fununit = Pa*s
      Cp: Piecewise | arg = T; pieces = {273.15, 553.75, 12010.1471-80.4072879*T^1+0.309866854*T^2-5.38186884E-4*T^3+3.62536437E-7*T^4}; argunit = K; fununit = J/(kg*K)
      rho: Piecewise
        arg = T
        smooth = contd1
        pieces = 
          {273.15, 293.15, 6.3092789034e-05*T^3-0.0603676398829*T^2+18.9229382407066*T-950.704055329848}
          {293.15, 373.15, 1.0335053319e-05*T^3-0.0133950656345*T^2+4.96928883266*T+432.257114008512}
        argunit = K
        fununit = kg/m^3
      k: Piecewise | arg = T; pieces = {273.15, 553.75, -0.869083936+0.00894880345*T^1-1.58366345E-5*T^2+7.97543259E-9*T^3}; argunit = K; fununit = W/(m*K)
      cs: Interpolation | table = {{273, 1403}, {278, 1427}, {283, 1447}, {293, 1481}, {303, 1507}, {313, 1526}, {323, 1541}, {333, 1552}, {343, 1555}, {353, 1555}, {363, 1550}, {373, 1543}}; interp = piecewisecubic; fununit = m/s; argunit = K
      an1: Analytic | funcname = alpha_p; expr = -1/rho(T)*d(rho(T),T); args = T; fununit = 1/K; argunit = K
      an2: Analytic | funcname = gamma_w; expr = 1+(T/Cp(T))*(alpha_p(T)*cs(T))^2; args = T; fununit = 1; argunit = K
      an3: Analytic | funcname = muB; expr = 2.79*eta(T); args = T; fununit = Pa*s; argunit = K
    MagneticLosses
      murPrim = 1.0
      murBis = 0.0
    DielectricLoss "Dielectric losses"
      epsilonBis = water_dielectric_image_2p45(T)
      epsilonPrim = water_dielectric_real_2p45(T)
      eta_epsilon = 0
      int1: Interpolation "dielectric_real_2p45" (disabled)
        funcname = dielectric_real_2p45
        table = 
          {0.10845987, 82.29281768}
          {1.735357918, 82.54143646}
          {3.145336226, 82.54143646}
          {4.772234273, 82.29281768}
          {7.04989154, 82.16850829}
          {8.893709328, 81.79558011}
          {10.30368764, 81.67127072}
          {11.93058568, 80.92541436}
          {13.99132321, 80.67679558}
          {16.37744035, 80.05524862}
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        interp = piecewisecubic
        extrap = linear
        fununit = 1
        argunit = degC
      int2: Interpolation "dielectric_image_2p45" (disabled)
        funcname = dielectric_image_2p45
        table = 
          {0, 21.25690608}
          {0.867678959, 20.63535912}
          {1.518438178, 20.01381215}
          {2.386117137, 19.51657459}
          {3.362255965, 18.77071823}
          {4.229934924, 17.90055249}
          {5.531453362, 17.27900552}
          {6.8329718, 16.78176796}
          {7.809110629, 16.16022099}
          {9.002169197, 15.78729282}
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        interp = cubicspline
        extrap = linear
        fununit = 1
        argunit = degC
    idealGas
      Rs = 461.5
      heatcapacity = vapor_cp_shomate(T)
      ratioofspecificheat = 1.3
      molarmass = 18.0153[g/mol]
      an4: Analytic "vapor_cp_shomate" | funcname = vapor_cp_shomate; expr = (30.09200 + 6.832514*(x/1000) + 6.793435*(x/1000)*(x/1000) -2.534480*(x/1000)*(x/1000)*(x/1000) +0.082139 /(x/1000)/(x/1000))/18.0153; fununit = J/(g*K); argunit = K
  basalt_porous: Common on selection geom1_blk3_dom
    def "Basic"
      heatcapacity = heat_capacity_p(T)
      density = basalt_rho
      thermalconductivity = basalt_k
      electricconductivity = basalt_ke
      porosity = basalt_porosity
      soundspeed = basalt_sound
      specificgasconstant = R_const/Mn
      thermalexpansioncoefficient = 6E-6
      int1: Interpolation "heat_capacity_p"
        funcname = heat_capacity_p
        table = 
          {19.92, 0.766}
          {19.95, 0.766}
          {19.99, 0.766}
          {20.02, 0.766}
          {20.05, 0.766}
          {20.09, 0.766}
          {20.12, 0.766}
          {20.15, 0.766}
          {20.19, 0.766}
          {20.22, 0.766}
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        fununit = J/(degC*g)
        argunit = degC
    DielectricLoss "Dielectric losses"
      epsilonBis = basalt_dielectric_image(T)
      epsilonPrim = basalt_dielectric_real(T)
      eta_epsilon = 0
      int1: Interpolation "dielectric_real" (disabled) | funcname = dielectric_real; table = {{25, 9.67}, {55, 10.14}, {78, 10.34}, {105, 10.38}}; interp = cubicspline; extrap = interior; fununit = 1; argunit = degC
      int2: Interpolation "dielectric_image" (disabled) | funcs = {int1, 1}; funcname = dielectric_image; table = {{25, 1.5055}, {55, 1.8370}, {78, 1.9171}, {105, 1.84944}}; interp = cubicspline; extrap = interior; fununit = 1; argunit = degC
    MagneticLosses
      murPrim = basalt_miu_real
      murBis = basalt_miu_image
    idealGas
      Rs = R_const/Mn
      heatcapacity = heat_capacity_p(T)
      ratioofspecificheat = 1
      molarmass = basalt_mw
      int2: Interpolation "heat_capacity_p"
        funcs = {int1, 1}
        funcname = heat_capacity_p
        table = 
          {19.92, 0.766}
          {19.95, 0.766}
          {19.99, 0.766}
          {20.02, 0.766}
          {20.05, 0.766}
          {20.09, 0.766}
          {20.12, 0.766}
          {20.15, 0.766}
          {20.19, 0.766}
          {20.22, 0.766}
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        fununit = J/(degC*g)
        argunit = degC
  basalt_multiphase: Multiphase on selection geom1_blk3_dom
    def "Basic"
      MIXING_RULE_PREFIX:electricconductivity = volume_average
      MIXING_RULE_PREFIX:thermalconductivity = volume_average
      MIXING_RULE_PREFIX:density = volume_average
      MIXING_RULE_PREFIX:heatcapacity = mass_average
      MIXING_RULE_PREFIX:thermalexpansioncoefficient = mass_average
      MIXING_RULE_PREFIX:bulkviscosity = volume_average
      MIXING_RULE_PREFIX:dynamicviscosity = volume_average
      MIXING_RULE_PREFIX:ratioofspecificheat = mass_average
      MIXING_RULE_PREFIX:soundspeed = volume_average
      MIXING_RULE_PREFIX:molarmass = volume_average
      MIXING_RULE_PREFIX:relpermeability = volume_average
      MIXING_RULE_PREFIX:relpermittivity = volume_average
      MIXING_RULE_PREFIX:compressibility = volume_average
      MIXING_RULE_PREFIX:specificgasconstant = volume_average
      MIXING_RULE_PREFIX:porosity = volume_average
    DielectricLoss "Dielectric losses"
      epsilonBis = -imag(((basalt_multiphase.moisture.Vf*((water_dielectric_real_2p45(T)-i*water_dielectric_image_2p45(T))^0.3333))+(basalt_multiphase.basalt.Vf*((basalt_dielectric_real(T)-i*basalt_dielectric_image(T))^0.3333))+(basalt_multiphase.vapour.Vf*(vapor_dielectric_real_2p45v(T)^0.3333))+(basalt_multiphase.air.Vf*(1.00006^0.3333)))^3)
      epsilonPrim = real(((basalt_multiphase.moisture.Vf*((water_dielectric_real_2p45(T)-i*water_dielectric_image_2p45(T))^0.3333))+(basalt_multiphase.basalt.Vf*((basalt_dielectric_real(T)-i*basalt_dielectric_image(T))^0.3333))+(basalt_multiphase.vapour.Vf*(vapor_dielectric_real_2p45v(T)^0.3333))+(basalt_multiphase.air.Vf*(1.00006^0.3333)))^3)
      eta_epsilon = 0
      MIXING_RULE_PREFIX:epsilonBis = homogenized
      MIXING_RULE_PREFIX:epsilonPrim = homogenized
      MIXING_RULE_PREFIX:eta_epsilon = volume_average
    MagneticLosses
      murPrim = 1
      murBis = 0
      MIXING_RULE_PREFIX:murPrim = volume_average
      MIXING_RULE_PREFIX:murBis = volume_average
    RefractiveIndex
      ki = 0
      MIXING_RULE_PREFIX:n = volume_average
      MIXING_RULE_PREFIX:ki = volume_average
    NonlinearModel
      MIXING_RULE_PREFIX:BA = volume_average
    idealGas
      MIXING_RULE_PREFIX:Rs = volume_average
      MIXING_RULE_PREFIX:heatcapacity = volume_average
      MIXING_RULE_PREFIX:ratioofspecificheat = mass_average
      MIXING_RULE_PREFIX:molarmass = mass_average
    basalt: PhaseLink | link = basalt_porous
    air: PhaseLink | link = air
    vapour: PhaseLink | link = vapour
    moisture: PhaseLink | link = moisture

Physics
  EM: ElectromagneticWaves "Electromagnetics Model" on all domains
    dependent variable E = {Ex, Ey, Ez}
    MeshControl.ResolveWaveInLossyMedia = 1
    wee1: WaveEquationElectric "wave eveyrwhere" (default)
      DisplacementFieldModel = DielectricLoss
      ConstitutiveRelationH = MagneticLosses
      minput_temperature_src = root.model.T
      minput_pressure = minput.pA
    pec1: PerfectElectricConductor "MetalicWallsEdges" (default)
    init1: init "IVs" (default)
    port1: Port "gun" on boundaries 38 | Pin = gunPow; PortType = Rectangular; PortModeNumber = gunMode
    pec2: PerfectElectricConductor "FixBCs" on boundaries 5-9, 12, 14, 15, 25
  bHT: HeatTransfer "Heat Transfer Model" on selection geom1_blk3_dom
    dependent variable T
    PhysicalModelProperty.Tref = minput.T
    RadiationSettings.opaque = ht.dfltopaque
    solid1: SolidHeatTransferModel "Basalt" (default)
      minput_strainreferencetemperature = minput.T
      minput_pressure = minput.pA
    init1: init "IVs" (default) | Tinit = minput.T
    ins1: ThermalInsulation "Walls" (default)
    porous1: PorousMediumHeatTransferModel "basalt_sample" on selection geom1_blk3_dom
      fluid1: FluidPorousMediumHeatTransferModel "moist_air" (default)
        InputType = vaporMassFraction
        omega_moist = basalt_multiphase.vapour.Vf
        fluidType = moistAir
        minput_pressure = minput.pA
        phc1: PhaseChangeMaterial "vle" on all domains
          T_pc12 = 100 [degC]
          L_pc12 = water_latent_heat
          MaterialPhase1 = moisture
          MaterialPhase2 = vapour
          minput_pressure = minput.pA
      pm1: PorousMatrixPorousMediumHeatTransferModel "basalt_porous" (default)
        minput_temperature_src = root.model.bHT.porous.pm.Tinput
    hf1: HeatFluxBoundary "cooling_eq" on selection geom1_blk3_bnd
      HeatFluxType = ConvectiveHeatFlux
      q0_input = 275
      h = 275
      Text_src = root.model.environment.T_amb
      materialType = from_mat

Multiphysics
  basaltMWHT: ElectromagneticHeating "MW+Heat" on selection geom1_blk3_dom | EMHeat_physics = EM; Heat_physics = bHT

Mesh
  mesh1 "optMESH"
    size: MeshSizeDefault "everywhere_size" | hmax = 10 [mm]; hmin = 1 [mm]; hauto = 1; custom = on
    ftet2: FreeTet "everywhere_style" on domains 1-3, 5-9 | optlevel = high; optlarge = on; optsmall = on
    size1: Size "basalt_size" on selection geom1_blk3_dom | hmax = 1 [mm]; hmin = 0.1 [mm]; hauto = 1; custom = on
    ftet3: FreeTet "basalt_style" on selection geom1_blk3_dom | optlevel = high; optlarge = on; optsmall = on

Studies
  std1 "Study 1"
    ftrans: FrequencyTransient "MWHT"
      tlist = range(0,rundt,runtest)
      freq = gunFreq
      usestoresel = selection
      storesel = {geom1_blk3_dom}